// COMSOL Multiphysics 5.4.0.208 model "effective_diffusivity.mph"
// Effective Diffusivity in Porous Materials
// This example introduces the concept of effective diffusivity in porous media by comparing the transport through an artificial porous structure, described in a detailed model, with a simplified homogeneous porous-medium approach using effective transport properties.
// Outline of the model tree
// Components: comp1 "Component 1", comp2 "Component 2"

Parameters
  D2 = 1e-5[m^2/s]  // Diffusion coefficient
  c_max = 3[mol/m^3]  // Peak initial concentration
  k_f = 5[m/s]  // Mass transfer coefficient
  a = 1000  // Dimensionless constant
  epsilon = 0.383  // Porosity
  D1 = 2.15e-6[m^2/s]  // Diffusion coefficient, 1D

Variables
  var1 "Variables 1"
    c0 = c_max*exp(a*(-(x/0.4[mm])^2))  // Initial concentration
  var2 "Variables 2" [comp1]
    flux_avg = aveop1(k_f*c)  // Average flux
  var3 "Variables 3" [comp2]
    flux_hom = k_f*c2  // Flux, 1D model

Selections
  sel1: Explicit "Left boundary" [comp1] on boundaries 1
  sel2: Explicit "Right boundary" [comp1] on boundaries 276
  sel3: Explicit "Top-right vertex" [comp1] on points 532

Couplings
  aveop1: Average on selection sel2

Geometry
  geom1 "Geometry 1" [comp1] (2D, length unit m)
    imp1: Import | type = native; filename = effective_diffusivity.mphbin; meshfilename = effective_diffusivity.mphbin
    fin: Finalize "Form Union"
  geom2 "Geometry 2" [comp2] (1D, length unit m)
    i1: Interval | coord = {0, 8e-4}
    fin: Finalize "Form Union"

Physics
  tds: DilutedSpecies "Transport of Diluted Species" [geom1] on all domains
    dependent variable c
    TransportMechanism.Convection = 0
    cdm1: ConvectionDiffusionMigration "Transport Properties 1" (default) | D_c = D2
    nflx1: NoFlux (default)
    init1: init "Initial Values 1" (default) | initc = c0
    conc1: Concentration on selection sel1 | species = 1; c0 = c_max
    fl1: FluxBoundary "Flux 1" on selection sel2 | FluxType = ExternalConvection; species = 1; kc = k_f
  tds2: DilutedSpecies "Transport of Diluted Species 2" [geom2] on all domains
    dependent variable c2
    TransportMechanism.Convection = 0
    cdm1: ConvectionDiffusionMigration "Transport Properties 1" (default) | D_c2 = D1/epsilon
    nflx1: NoFlux (default)
    init1: init "Initial Values 1" (default) | initc = c0
    conc1: Concentration on boundaries 1 | species = 1; c0 = c_max
    fl1: FluxBoundary "Flux 1" on boundaries 2 | FluxType = ExternalConvection; species = 1; kc = k_f/epsilon

Mesh
  mesh1 "Mesh 1" [geom1] (physics-controlled)
  mesh2 "Mesh 2" [geom2] (physics-controlled)
    size: MeshSizeDefault | hauto = 2

Studies
  std1 "Study 1"
    time: Transient "Time Dependent" | tunit = ms; tlist = range(0,2,100); solve for = {tds}
  std2 "Study 2"
    time: Transient "Time Dependent" | tunit = ms; tlist = range(0,2,100); solve for = {tds2}

Solver configurations
  sol1 "Solution 1" (study std1)
    v1: Variables "Dependent Variables 1"
    t1: Time "Time-Dependent Solver 1" | tlist = range(0,2,100); rtol = 0.005; maxorder = 2
      fc1: FullyCoupled
        linsolver = d1
        maxiter = 8
        damp = 0.9
        jtech = once
        stabacc = aacc
        aaccdim = 5
        aaccmix = 0.9
        aaccdelay = 1
      d1: Direct | linsolver = pardiso; pivotperturb = 1.0E-13
  sol2 "Solution 2" (study std2)
    // same settings as sol1

Datasets
  dset1: Solution | solution = sol1
  dset2: Solution | solution = sol2
  dset3: Solution | solution = sol2

Derived values
  int1: IntSurface "Surface Integration 1" on all domains | data = dset1; table = tbl1; expr = 1/(0.8[mm])^2

Tables
  tbl1: Table
    // Surface Integration 1 (1/(0.8[mm])^2)
    Time (ms) | 1/(0.8[mm])^2 (1)
    0 | 0.382893
    2 | 0.382893
    4 | 0.382893
    6 | 0.382893
    8 | 0.382893
    10 | 0.382893
    12 | 0.382893
    14 | 0.382893
    16 | 0.382893
    18 | 0.382893
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
Plots
  pg1: PlotGroup2D "Concentration (tds)" | data = dset1
    surf1: Surface | expr = c
  pg2: PlotGroup1D "Molar fluxes" | data = dset1; ylabel = Average flux (mol/(m*s))
    ptgr1: PointGraph on selection sel3 | expr = flux_avg; descr = Average flux
    ptgr2: PointGraph on boundaries 2 | data = dset3; expr = flux_hom; descr = Flux, 1D model
  pg3: PlotGroup1D "Concentration (tds2)" | data = dset3
    lngr1: LineGraph on domains 1 | expr = c2